// COMSOL Multiphysics 5.0.0.243 model "be3_ravahimanana.mph"
// Outline of the model tree
// Components: comp1 "Composant 1", comp2 "Component 2"

Parameters
  L1 = 1[m]  // longueur caracteristique
  L2 = L1/3  // longueur du patch
  L2trou = .8*L2  // longeur du trou
  rho1 = 1[kg/m^2]  // masse surfacique de la membrane
  rho2 = 1.5[kg/m^2]  // masse surfacique du patch

Geometry
  geom1 "Géométrie" [comp1] (2D, length unit m)
    pol1: Polygon "portion_membrane" | x = -L1/2, -L1*cos(pi/4)/2, 0; y = 0, L1*sin(pi/4)/2, 0
    mir1: Mirror "Miroir 1" | input = pol1; keep = on; axis = {cos(pi/4), sin(pi/4)}
    mir2: Mirror "Miroir 2" | input = mir1, pol1; keep = on; axis = {0, 1}
    mir3: Mirror "Miroir 3" | input = mir1, mir2, pol1; keep = on
    uni3: Union "membrane" | input = mir1, mir2, mir3, pol1; intbnd = off; edge = all
    pol2: Polygon "portion_trou" | x = 0, L2trou*sin(2*pi/5)/2,0; y = L2trou/2, L2trou/2*cos(2*pi/5),0
    rot1: Rotate "Rotation 1" | input = pol2; keep = on; rot = 72
    rot2: Rotate "Rotation 2" | input = rot1; keep = on; rot = 72
    rot3: Rotate "Rotation 3" | input = rot2; keep = on; rot = 72
    rot4: Rotate "Rotation 4" | input = rot3; keep = on; rot = 72
    uni1: Union "forme_trou" | input = pol2, rot1, rot2, rot3, rot4; intbnd = off; edge = all
    dif1: Difference "trouage" | input = uni3; input2 = uni1; intbnd = off; edge = all
    pol3: Polygon "portion_patch" | x = 0, L2*sin(2*pi/5)/2,0; y = L2/2, L2/2*cos(2*pi/5),0
    rot5: Rotate "Rotation 5" | input = pol3; keep = on; rot = 72
    rot6: Rotate "Rotation 6" | input = rot5; keep = on; rot = 72
    rot7: Rotate "Rotation 7" | input = rot6; keep = on; rot = 72
    rot8: Rotate "Rotation 8" | input = rot7; keep = on; rot = 72
    uni2: Union "forme_patch" | contributeto = none; input = pol3, rot5, rot6, rot7, rot8; intbnd = off; edge = all
    fin: Finalize "Constituer une union"
  geom2 "Geometry 2" [comp2] (2D, length unit m)
    pol1: Polygon "portion_membrane"
      type = solid
      source = vectors
      tableexceloverwrite = on
      x = -L1/2, -L1*cos(pi/4)/2, 0
      y = 0, L1*sin(pi/4)/2, 0
      addedrowidx = -1
    mir1: Mirror "Miroir 1"
      input = pol1
      keep = on
      posconstr = {on, on}
      axisconstr = {on, on}
      axis = {cos(pi/4), sin(pi/4)}
    mir2: Mirror "Miroir 2" | input = mir1, pol1; keep = on; posconstr = {on, on}; axisconstr = {on, on}; axis = {0, 1}
    mir3: Mirror "Miroir 3"
      input = mir1, mir2, pol1
      keep = on
      posconstr = {on, on}
      axisconstr = {on, on}
      axis = {1, 0}
    uni1: Union "membrane" | input = mir1, mir2, mir3, pol1; edge = all; regularize = on
    pol2: Polygon "portion_trou"
      type = solid
      source = vectors
      tableexceloverwrite = on
      x = 0, L2trou*sin(2*pi/5)/2,0
      y = L2trou/2, L2trou/2*cos(2*pi/5),0
      addedrowidx = -1
    rot1: Rotate "Rotation 1" | input = pol2; keep = on; rotconstr = on; rot = 72; posconstr = {on, on}
    rot2: Rotate "Rotation 2" | input = rot1; keep = on; rotconstr = on; rot = 72; posconstr = {on, on}
    rot3: Rotate "Rotation 3" | input = rot2; keep = on; rotconstr = on; rot = 72; posconstr = {on, on}
    rot4: Rotate "Rotation 4" | input = rot3; keep = on; rotconstr = on; rot = 72; posconstr = {on, on}
    uni2: Union "forme_trou" | input = pol2, rot1, rot2, rot3, rot4; edge = all; regularize = on
    dif1: Difference "trouage" | input = uni1; input2 = uni2; edge = all
    fin: Finalize "Form Union"

Physics
  waeq: WaveEquation "Equation des ondes" [geom1] on domains 1, 2
    dependent variable u
    Units.DependentVariableQuantity = length
    weq1: WaveEquation "Equation des ondes 1" (default) | ea = rho1
    zflx1: ZeroFluxBoundary "Flux nul 1" (default)
    init1: init "Valeurs initiales 1" (default)
    dir1: DirichletBoundary "Condition aux bords" on boundaries 1-4, 11, 14, 17, 18 | r = 0
    dir2: DirichletBoundary "Condition de continuite" on boundaries 7, 8, 10, 12, 15 | r = u2
  waeq2: WaveEquation "Equation des ondes 2" [geom1] on domains 2, 3
    dependent variable u2
    Units.DependentVariableQuantity = length
    weq1: WaveEquation "Equation des ondes 1" (default) | ea = rho2
    zflx1: ZeroFluxBoundary "Flux nul 1" (default)
    init1: init "Valeurs initiales 1" (default)
    dir1: DirichletBoundary "Condition de continuite" on boundaries 5, 6, 9, 13, 16 | r = u

Mesh
  mesh1 "Maillage 1" [geom1] (physics-controlled)
    size: MeshSizeDefault "Taille" | hauto = 5
  mesh2 "Mesh 2" [geom2] (physics-controlled)

Studies
  std1 "Etude 1"
    stat: Stationary "Stationnaire"
    eigv1: Eigenvalue "Valeur propre 1" | neigs = 6

Solver configurations
  sol1 "Solution 1" (study std1)
    v1: Variables "Variables dépendantes 1"
    s1: Stationary "Solveur stationnaire 1"
      dDef: Direct
      fc1: FullyCoupled "Couplage fort 1" | linsolver = dDef
    su1: StoreSolution
    v2: Variables "Variables dépendantes 2" | initmethod = sol; notsolmethod = sol
    e1: Eigenvalue "Solveur aux valeurs propres 1" | neigs = 6; shift = 0; linpmethod = sol
      dDef: Direct
  sol2 "Stockage de la solution 1" (study std1)

Datasets
  dset1: Solution | solution = sol1
  dset2: Solution | solution = sol2

Plots
  pg1: PlotGroup2D "Deformée 2D" | data = dset1
    surf1: Surface "surface u1" | data = dset1; expr = u
    surf2: Surface "surface u2" | expr = u2
  pg2: PlotGroup2D "Deformee membrane" | data = dset1
    surf1: Surface "Surface membrane" | expr = u
      hght1: Height "Elévation membrane" | expr = u
    surf2: Surface "Surface patch" | expr = u2
      hght1: Height "Elévation patch" | expr = u; isheightaxisshown = on